## 1. Connection of energy units Calory <---> Joule
# Lets consider the boiling of 1 liter of water in the electric kettle.
m_w := 1*kg = 1000 gm
ΔT := 100*K - 20*K = 80 K
ρ_w := 1*gm/cm^3
# 1 Calory is amount of energy needed to heat 1 gm of water on 1 C
E_Calory := m_w/gm*ΔT*cal/K = 80000 cal
P_k := 1.5*kW
Δt := 3.8*60*s = 228 s
E_Joule := P_k*Δt = 342000 J
E_Joule/J/(E_Calory/cal) = 4.275  # Correct answer is 4.19 Joules in 1 Calory
E_man_daily := 2500*kcal = 10467000 J
## 2. Which part of the men daily energy consumption is exhausted for breathing.
ΔV := 1.5*liter
ΔE_br_one := ΔV*10^5*Pa = 150 J
ΔE_br_day := ΔE_br_one*15*60*24 = 3240000 J
ΔE_br_day/E_man_daily = 0.309544
## 3. What is the energy of fuel burning for 1 car during the standard trip "home-office"?
Econs_car := 10*liter/(100*km)
ρ_fuel := 0.8*kg/liter
Way := 2*10*km
Heat_burning_energy := 45*10^6*J/kg
E_car := Way*Econs_car*ρ_fuel*Heat_burning_energy = 72000000 J
E_bus := E_car*6/30 = 14400000 J
E_car*0.4 + E_bus*0.6 = 37440000 J
E_man_daily_average := 200*10^6*J
E_humanity_annual := E_man_daily_average*7*10^9*365 = 5.11e20 J
Q := 10^21*J
